<neuroml xmlns="http://www.neuroml.org/schema/neuroml2"  xmlns:xs="http://www.w3.org/2001/XMLSchema" xmlns:xsi="http://www.w3.org/2001/XMLSchema-instance" xsi:schemaLocation="http://www.neuroml.org/schema/neuroml2 https://raw.github.com/NeuroML/NeuroML2/development/Schemas/NeuroML2/NeuroML_v2beta4.xsd" id="NeuroML2_file_exported_from_NEURON">

    <include href="/channels/leak_chan.channel.nml"/>
    <include href="/channelscapool.nml"/>

    <include href="/channels/cal.channel.nml"/>
    <include href="/channels/can.channel.nml"/>
    <include href="/channels/cat.channel.nml"/>
    <include href="/channels/cagk.channel.nml"/>
    <include href="/channels/KahpM95.channel.nml"/>

    <cell id="ca3pyramidalcell">
        <notes>Cell: ca3pyramidalcell_0_0 exported from NEURON ModelView</notes>
        <morphology id="morphology">
            <segment id="0" name="Seg0_soma_0">
                <proximal x="-1.135000e+00" y="2.100000e+01" z="1.702000e+00" diameter="1.321000e+01"/>
                <distal x="-1.135000e+00" y="2.100000e+01" z="1.292000e+01" diameter="1.321000e+01"/>
            </segment>
            <segment id="778" name="Seg0_dendrite_49">
                <parent segment="0" fractionAlong="1"/>
                <proximal x="-1.135000e+00" y="2.100000e+01" z="1.692000e+00" diameter="1.321000e+01"/>
                <distal x="-5.000000e+00" y="5.000000e+00" z="1.000000e+00" diameter="9.000000e-01"/>
            </segment>
            <segment id="779" name="Seg1_dendrite_49">
                <parent segment="778" fractionAlong="1"/>
                <distal x="-8.500000e+00" y="1.500000e+00" z="5.500000e+00" diameter="9.000000e-01"/>
            </segment>
            <segment id="780" name="Seg2_dendrite_49">
                <parent segment="779" fractionAlong="1"/>
                <distal x="-1.200000e+01" y="0.000000e+00" z="1.000000e+00" diameter="9.000000e-01"/>
            </segment>
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            <segmentGroup neuroLexId="sao864921383" id="soma_0">
                <notes>This group contains an unbranched set of segments, and all of the segmentGroups marked with
             neuroLexId = sao864921383 form a non-overlapping set of all of the segments.
             These segmentGroups correspond to the 'cables' of NeuroML v1.8.1, and map to/from NEURON sections.</notes>
                <member segment="0"/>
            </segmentGroup>
            <segmentGroup neuroLexId="sao864921383" id="dendrite_49">
                <notes>This group contains an unbranched set of segments, and all of the segmentGroups marked with
             neuroLexId = sao864921383 form a non-overlapping set of all of the segments.
             These segmentGroups correspond to the 'cables' of NeuroML v1.8.1, and map to/from NEURON sections.</notes>
                <property tag="numberInternalDivisions" value="7"/>
                <member segment="778"/>
                <member segment="779"/>
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            </segmentGroup>
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
            <segmentGroup id="all">
                <include segmentGroup="soma_0"/>
                <include segmentGroup="dendrite_49"/>
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            </segmentGroup>

            <segmentGroup id="soma_group">
                <include segmentGroup="soma_0"/>
            </segmentGroup>

            <segmentGroup id="apical_dendrite_0_group">  <!-- -->
                <include segmentGroup="axon_0"/>
            </segmentGroup>

            <segmentGroup id="apical_dendrite_1-_group">
                <include segmentGroup="apical_dendrite_1"/>
                <include segmentGroup="apical_dendrite_2"/>
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            </segmentGroup>

            <segmentGroup id="apical_dendrite_group">
                <include segmentGroup="apical_dendrite_0_group"/>
                <include segmentGroup="apical_dendrite_1-_group"/>
            </segmentGroup>

            <segmentGroup id="dendrite_group">
                <include segmentGroup="dendrite_0"/>
                <include segmentGroup="dendrite_1"/>
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            </segmentGroup>

            <segmentGroup id="alldendrites_group">
                <include segmentGroup="apical_dendrite_group"/>
                <include segmentGroup="dendrite_group"/>
            </segmentGroup>

            <segmentGroup id="axon_group">
                <include segmentGroup="axon_0"/>
            </segmentGroup>

        </morphology>

        <!-- Biophysical properties -->
        <biophysicalProperties id="biophys">

            <membraneProperties>

                <channelDensity id="leak_all" ionChannel="leak_chan" condDensity="0.039416633819471816mS_per_cm2" segmentGroup="all" erev="-64mV" ion="non_specific"/>

                <!--0.01--><channelDensityGHK2 id="cal_soma" ionChannel="cal" condDensity="0.01mS_per_cm2" segmentGroup="soma_group" ion="ca"/>
                <!--0.01--><channelDensityGHK2 id="cal_alldendrites" ionChannel="cal" condDensity="0.01mS_per_cm2" segmentGroup="alldendrites_group" ion="ca"/>
                <!--0.01--><channelDensityGHK2 id="can_soma" ionChannel="can" condDensity="0.01mS_per_cm2" segmentGroup="soma_group" ion="ca"/>
                <!--0.01--><channelDensityGHK2 id="can_alldendrites" ionChannel="can" condDensity="0.01mS_per_cm2" segmentGroup="alldendrites_group" ion="ca"/>
                <!--0.01--><channelDensityGHK2 id="cat_soma" ionChannel="cat" condDensity="0.01mS_per_cm2" segmentGroup="soma_group" ion="ca"/>
                <!--0.01--><channelDensityGHK2 id="cat_alldendrites" ionChannel="cat" condDensity="0.01mS_per_cm2" segmentGroup="alldendrites_group" ion="ca"/>
                <!--0.05--><channelDensity id="cagk_soma" ionChannel="cagk" condDensity="0.05mS_per_cm2" segment_group="soma_group" erev="-90mV" ion="k"/>
                <!--0.05--><channelDensity id="cagk_alldendrites" ionChannel="cagk" condDensity="0.05mS_per_cm2" segment_group="alldendrites_group" erev="-90mV" ion="k"/>
                <!--0.1--><channelDensity id="KahpM95_soma" ionChannel="KahpM95" condDensity="0.1mS_per_cm2" segment_group="soma_group" erev="-90mV" ion="k"/>
                <!--0.1--><channelDensity id="KahpM95_alldendrites" ionChannel="KahpM95" condDensity="0.1mS_per_cm2" segment_group="alldendrites_group" erev="-90mV" ion="k"/>

                <spikeThresh value="0 mV"/>
                <specificCapacitance value="1.41 uF_per_cm2" />
                <initMembPotential value="-64.0 mV"/>

            </membraneProperties>

            <intracellularProperties>
                <resistivity value="0.15 kohm_cm"/>
                <species id="ca" concentrationModel="capool_diam_13_21" segmentGroup="soma_group" ion="ca" initialConcentration="5e-5mM" initialExtConcentration="2mM"/>
                <species id="ca" concentrationModel="capool_diam_7_3" segmentGroup="apical_dendrite_0_group" ion="ca" initialConcentration="5e-5mM" initialExtConcentration="2mM"/>
                <species id="ca" concentrationModel="capool_diam_0_729471890971" segmentGroup="apical_dendrite_1-_group" ion="ca" initialConcentration="5e-5mM" initialExtConcentration="2mM"/>
                <species id="ca" concentrationModel="capool_diam_0_663679808841" segmentGroup="dendrite_group" ion="ca" initialConcentration="5e-5mM" initialExtConcentration="2mM"/>
            </intracellularProperties>

        </biophysicalProperties>

    </cell>

</neuroml>
